<?xml version="1.0" ?>

<Node name="root" gravity="0 -9.81 0" dt="0.01">
    <RequiredPlugin name="Sofa.Component.IO.Mesh"/> <!-- MeshGmshLoader -->
    <RequiredPlugin name="Sofa.Component.ODESolver.Backward"/> <!-- EulerImplicitSolver -->
    <RequiredPlugin name="Sofa.Component.LinearSolver.Iterative"/> <!-- CGLinearSolver -->
    <RequiredPlugin name="Sofa.Component.Topology.Container.Dynamic"/> <!-- TetrahedronSetTopologyContainer -->
    <RequiredPlugin name="MultiThreading"/> <!-- TetrahedronSetGeometryAlgorithms -->
    <RequiredPlugin name="Sofa.Component.StateContainer"/> <!-- MechanicalObject -->
    <RequiredPlugin name="Sofa.Component.SolidMechanics.FEM.Elastic"/> <!-- ParallelTetrahedronFEMForceField -->
    <RequiredPlugin name="Sofa.Component.Mass"/> <!-- UniformMass -->
    <RequiredPlugin name="Sofa.Component.MechanicalLoad"/> <!-- ConstantForceField -->
    <RequiredPlugin name="Sofa.Component.SceneUtility"/> <!-- InfoComponent (if needed for debugging) -->
    <RequiredPlugin name="Sofa.Component.Visual"/> <!-- Needed to use components [VisualStyle] -->
    <RequiredPlugin name="SofaCUDA"/> <!-- Needed to use components [CUDA] -->
    <RequiredPlugin name="Sofa.Component.Topology.Container.Constant"/> <!-- Needed to use components [MeshTopology] -->
    <RequiredPlugin name="Sofa.GL.Component.Rendering3D"/> <!-- Needed to use components [OglModel] -->
    <RequiredPlugin name="Sofa.Component.Collision.Geometry"/> <!-- Needed to use components [TriangleCollisionModel] -->
    <RequiredPlugin name="Sofa.Component.Constraint.Projective"/> <!-- Needed to use components [FixedProjectiveConstraint] -->
    <RequiredPlugin name="Sofa.Component.Mapping.Linear"/> <!-- Needed to use components [BarycentricMapping] -->

    <!-- Load Gmsh .msh volume mesh -->
    <MeshGmshLoader name="meshLoader" filename="brain.msh" rotation="0 0 -90"/>
    <DefaultAnimationLoop name="defaultAnimationLoop" />
    <DefaultVisualManagerLoop name="defaultVisualManagerLoop" />


    <Node name="WhiteMatter">
        <!-- Solvers -->
        <EulerImplicitSolver rayleighStiffness="0.1" rayleighMass="0.1" />
        <CGLinearSolver iterations="200" tolerance="1e-6" threshold="1e-6" />

        <!-- Topology + geometry -->
        <TetrahedronSetTopologyContainer name="topo" src="@../meshLoader" />
        <TetrahedronSetGeometryAlgorithms template="CudaVec3f" name="GeomAlgo" />
        <MechanicalObject template="CudaVec3f" name="MechanicalModel" showObject="1" />

        <!--Material -->
        <TetrahedronFEMForceField name="FEM" youngModulus="1200" poissonRatio="0.495" mstate="@MechanicalModel"/>

        <!-- Mass and external force -->
        <UniformMass name="mass" totalMass="10" />
        <FixedProjectiveConstraint indices="0 1 2 3 4 5 6 7 8 9" />
        <Node name="VisualSurface">
            <MeshSTLLoader name="surfaceLoader" filename="white_matter_inverted.stl" rotation="0 0 -90" />
            <MeshTopology src="@surfaceLoader" />
            <OglModel name="OglModel" src="@surfaceLoader" color="1.0 0.6 0.8" />
            <BarycentricMapping input="@MechanicalModel" output="@OglModel" template="CudaVec3f,Vec3d" />
        </Node>
    </Node>


    <Node name="Skull">
        <MeshSTLLoader name="skullLoader" filename="../skull/inner_skull_centered.stl" rotation="-90 0 0"/>
        <!-- Solvers -->
        <MeshTopology name="MeshToTopology" src="@skullLoader" />

        <MechanicalObject template="Vec3d" name="MechanicalModel" showObject="1"/>

        <TriangleCollisionModel name="CollisionModel" />


        <!-- Mass and external force -->
        <UniformMass name="mass" totalMass="10" />
        <FixedProjectiveConstraint indices="0 1 2 3 4 5 6 7 8 9" />
        <Node name="VisualSurface">
            <MeshTopology src="@../skullLoader"/>
            <OglModel name="OglModel" src="@../skullLoader" color="0.8 0.8 0.8"/>
            <BarycentricMapping input="@MechanicalModel" output="@OglModel"/>
        </Node>
    </Node>


</Node>
